// COMSOL Multiphysics 6.0.0.405 model "Puce microfluidique 2D (Darcy) - 5VF.mph"
// Outline of the model tree

Parameters
  R = 0.3[mm]  // Rayon de l'immuno-organoïde
  mu_eau = 10^(-3)[Pa*s]  // Viscosité du fluide
  mu_orga = 1[Pa*s]  // Viscosité fictive de l'immuno-organoïde
  X0 = 0.5[mm]  // Coordonnée x immuno-organoïde
  Y0 = 5.2505[mm]  // Coordonnée y immuno-organoïde
  a = 1E-5[m]  // Paramètre Heaviside lissée
  n_cell = 4000  // Nombre de cellules dans l'organoïde
  V_max_O2 = 4E-17[mol/s]  // Maximum oxygen consumption of one cell
  K_m_O2 = 6.0e-3[mol/m^3]  // Constante de Michealis-Menten du dioxygène
  C_O2_in = 0.2[mol/m^3]  // Concentration entrée oxygène
  q = 50e-09[m^3/min]  // Débit volumique entrant
  J_O2 = q*C_O2_in  // Débit molaire entrant en oxygène
  x0 = 0  // coordonnée 00 du premier microcannaux
  y0 = 0  // coordonnée 00 du premier microcannaux
  x1 = 0.1[mm]  // largeur des microcannaux
  n = 10  // nombre de microcannaux
  d = 0.3[mm]  // taille micro pillier
  beta = 20  // angle trapese
  L = 4.94[mm]  // longueur totale du cannal
  l = 0.2[mm]  // longueur avant un premier microcannal
  e = 0.2[mm]  // largeur / épaisseur du microcannal
  alpha = 15  // angle branche en degré
  e1 = e/(cos(alpha*pi/180))  // epaisseur des branches coudé
  l1 = 0.80[mm]  // Espace du bout de la branche coudé au milieu du premier microcannal
  L1 = (l1-x1-e1/2)/sin(alpha*pi/180)  // longueur de la branche coudée
  D = 2.02[mm]  // Largeur de la chambre centrale
  r1 = 0.4[mm]  // Rayon des congé des rectangles limitant la chambre centrale
  k = 0.55  // coefficient, longueur portion des deux rectangles
  r2 = 0.4[mm]  // rayon organoïde
  x2 = x0+2*x1+D/2  // position organoïde
  y2 = y0-l+L/2  // position organoïde
  l2 = 0[mm]  // longueur supplémentaire du gros rectangle centrale
  l3 = 0[mm]  // longueur supplémentaire du gros rectangle centrale
  n_1 = 10  // nombre de microcannaux
  d_1 = 0.1[mm]  // taille micro pillier
  l1_1 = 0.70[mm]
  x2_1 = x0+2*x1+D/2  // position organoïde
  V_max_glu = 9.5e-17[mol/s]  // Maximum glucose consumption of one cell
  K_m_glu = 0.3 [mol/m^3]  // Constante de Michealis-Menten du glucose
  C_glu_in = 25[mol/m^3]  // Concentration d'entrée en glucose
  J_glu = q*C_glu_in  // Débit molaire entrant en glucose

Geometry
  geom1 "Géométrie 1" (2D, length unit m)
    pol1: Polygon "Polygone 1"
      source = table
      table = 
        {x0, y0}
        {x1, y0+x1*tan(beta*pi/180)}
        {x1, y0+(L-2*l-n*d)/(n+1)-x1*tan(beta*pi/180)}
        {x0, y0+(L-2*l-n*d)/(n+1)}
    arr1: Array "Réseau 1"
      input = pol1
      size = n+1
      type = linear
      linearsize = n+1
      displ = {0, y0+(L-2*l-n*d)/(n+1)+d}
    copy1: Copy "Copier 3" | input = arr1; keep = on; displx = 0; disply = 0
    mir1: Mirror "Miroir 3" | input = copy1; pos = {x1, 0}; axis = {1, 0}
    r1: Rectangle | pos = {x0-e1, y0-l}; size = {e1, L}
    pol2: Polygon "Polygone 2"
      source = table
      table = 
        {x0-e1, y0-l}
        {x0, y0-l}
        {x0-sin(alpha*pi/180)*(L1+(e/2)*tan(alpha*pi/180)), y0-l-cos(alpha*pi/180)*(L1+(e/2)*tan(alpha*pi/180))}
        {x0-e1-sin(alpha*pi/180)*(L1-(e/2)*tan(alpha*pi/180)), y0-l-cos(alpha*pi/180)*(L1-(e/2)*tan(alpha*pi/180))}
    r2: Rectangle
      pos = {x0+2*x1, y0-l-l2-(cos(alpha*pi/180)*(L1+(e/2)*tan(alpha*pi/180)))*k}
      size = {D/2, y0-l+L/2-(y0-l-l2-(cos(alpha*pi/180)*(L1+(e/2)*tan(alpha*pi/180)))*k)}
    r3: Rectangle
      pos = {x0+2*x1+D/4, y0-l-l3-(cos(alpha*pi/180)*(L1+(e/2)*tan(alpha*pi/180)))}
      size = {D/4, l3+(cos(alpha*pi/180)*(L1+(e/2)*tan(alpha*pi/180)))*(1-k)}
    copy2: Copy "Copier 1" | input = pol2, r2, r3; keep = on; displx = 0; disply = 0
    mir2: Mirror "Miroir 1" | input = copy2; pos = {x0, y0-l+L/2}; axis = {0, 1}
    fil1: Fillet "Congé 1" | point = r2(1) points 1; r3(1) points 1; mir2(2) points 1; mir2(3) points 1; radius = r1
    uni1: Union | input = fil1; edge = all
    copy3: Copy "Copier 2" | input = arr1, mir2(1), mir1, pol2, r1, uni1; displx = 0; disply = 0
    mir3: Mirror "Miroir 2" | input = copy3; keep = on; pos = {x0+2*x1+D/2, y0-l+L/2}; axis = {1, 0}
    uni2: Union | input = copy3(26), mir3(26); edge = all
    c1: Circle "Cercle 2" | pos = {x2, y2}; r = r2
    uni3: Union | input = copy3(24), copy3(25), copy3(12); edge = all
    uni4: Union | input = mir3(24), mir3(25), mir3(12); edge = all
    fin: Finalize "Form Union" | pairtype = contact

Physics
  spf: CreepingFlow "Ecoulement de Stokes" on domains 1, 24, 47, 48
    dependent variable u = {u, v, w}
    PhysicalModelProperty.EnablePorousMediaDomains = 1
    fp1: FluidProperties "Propriétés du fluide 1" (default)
      rho_mat = userdef
      rho = 1000[kg/m^3]
      mu_mat = userdef
      mu = 1e-3[Pa*s]
    init1: init "Valeurs initiales 1" (default)
    wallbc1: WallBC "Paroi 1" (default)
    porous1: PorousMedium "Organoïde" on domains 48
      fluid1: FluidPorousMedium "Fluide 1" (default)
        rho_mat = userdef
        rho = 1000[kg/m^3]
        mu_mat = userdef
        mu = 1e-3[Pa*s]
      pm1: PorousMatrixPorousMedium "Matrice poreuse 1" (default)
        epsilon_p_mat = userdef
        epsilon_p = 0.26
        kappa_mat = userdef
        kappa = 1e-10[m^2]
    inl1: InletBoundary "Entrée antisym" on boundaries 3, 229
      BoundaryCondition = FullyDevelopedFlow
      p0 = 2000
      FullyDevelopedFlowOption = V0
      V0fdf = q
      Dzfdf = 2e-04
      MassFlowType = StandardFlowRate
    out1: OutletBoundary "Sortie antisym" on boundaries 1, 230
      BoundaryCondition = Pressure
      p0 = 1[atm]
      NormalFlow = 0
      FullyDevelopedFlowOption = p0av
      V0fdf = q
      Dzfdf = 2e-04
    inl2: InletBoundary "Entrée sym adj" (disabled) on boundaries 1, 3
      BoundaryCondition = FullyDevelopedFlow
      p0 = 2000
      FullyDevelopedFlowOption = V0
      V0fdf = q
      Dzfdf = 2e-04
      MassFlowType = StandardFlowRate
    out2: OutletBoundary "Sortie sym adj" (disabled) on boundaries 229, 230
      BoundaryCondition = Pressure
      p0 = 1[atm]
      NormalFlow = 0
      FullyDevelopedFlowOption = p0av
      V0fdf = q
      Dzfdf = 2e-04
    inl3: InletBoundary "Entrée sym" (disabled) on boundaries 3, 230
      BoundaryCondition = FullyDevelopedFlow
      p0 = 2000
      FullyDevelopedFlowOption = V0
      V0fdf = q
      Dzfdf = 2e-04
      MassFlowType = StandardFlowRate
    out3: OutletBoundary "Sortie sym" (disabled) on boundaries 1, 229
      BoundaryCondition = Pressure
      p0 = 1[atm]
      NormalFlow = 0
      FullyDevelopedFlowOption = p0av
      V0fdf = q
      Dzfdf = 2e-04
    porous2: PorousMedium "Matrigel" on domains 24
      fluid1: FluidPorousMedium "Fluid 1" (default)
        rho_mat = userdef
        rho = 1000[kg/m^3]
        mu_mat = userdef
        mu = 1e-3[Pa*s]
      pm1: PorousMatrixPorousMedium "Porous Matrix 1" (default)
        epsilon_p_mat = userdef
        epsilon_p = 0.994
        kappa_mat = userdef
        kappa = 10e-14[m^2]
  tds: DilutedSpecies "Transport d'espèces diluées" on all domains
    dependent variable c_O2 = {c_O2, c_glu}
    dz.dz = 1[mm]
    TransportMechanism.MassTransferInPorousMedia = 1
    cdm1: ConvectionDiffusionMigration "Propriétés de transport 1" (default) | D_c_O2 = 2.69e-9[m^2/s]; D_c = 2e-9[m^2/s]
    nflx1: NoFlux "Flux nul 1" (default)
    init1: init "Valeurs initiales 1" (default)
    porous1: PorousMedium "Organoïde" on domains 48
      fluid1: FluidPorousMedium "Fluide 1" (default)
        u_src = root.comp1.u
        FluidDiffusivityModelType = BruggemanModel
        DF_c_O2 = 2.69e-9[m^2/s]
        DF_c = 2e-9[m^2/s]
      pm1: PorousMatrixPorousMedium "Matrice poreuse 1" (default) | poro_mat = userdef; poro = 0.26
    reac1: Reactions "Réactions 1" on domains 48
      ReactingVolumeType = PoreVolume
      R_c_O2 = -(n_cell*V_max_O2*c_O2)/((4/3)*(pi*r2^3)*(c_O2+K_m_O2))
      R_c_glu = -(n_cell*V_max_glu*c_glu)/((4/3)*(pi*r2^3)*(c_glu+K_m_glu))
    conc1: Concentration (disabled) on no boundaries | species = {0, 0}; c0 = {0.5, 0}
    in1: Inflow "Ecoulement entrant antisym" on boundaries 3, 229 | c0 = {C_O2_in, C_glu_in}
    out1: Outflow "Ecoulement sortant antisym" on boundaries 1, 230
    in2: Inflow "Ecoulement entrant sym adj" (disabled) on boundaries 1, 3 | c0 = {C_O2_in, C_glu_in}
    out2: Outflow "Ecoulement sortant sym adj" (disabled) on boundaries 229, 230
    in3: Inflow "Ecoulement entrant sym" (disabled) on boundaries 3, 230 | c0 = {C_O2_in, C_glu_in}
    out3: Outflow "Ecoulement sortant sym" (disabled) on boundaries 1, 229
    porous2: PorousMedium "Matrigel" on domains 24
      fluid1: FluidPorousMedium "Fluid 1" (default) | DF_c_O2 = 2.69e-9[m^2/s]; FluidDiffusivityModelType = BruggemanModel
      pm1: PorousMatrixPorousMedium "Porous Matrix 1" (default) | poro_mat = userdef; poro = 0.994

Mesh
  mesh1 "Maillage 1" (physics-controlled)
    size: MeshSizeDefault "Taille" | table = cfd; hauto = 7

Studies
  std1 "Etude 1 : Symétrique 02 et Glu - Matrigel -"
    param: Parametric "Parametric Sweep"
      sweeptype = filled
      pname = {n, d}
      plistarr = {5 6 7 8 9 10 11, range(0.1,0.05,0.3)}
      punit = {, mm}
    stat: Stationary "Stationnaire"
  std2 "Etude 2 : Symétrique adjacent 02 et Glu - Matrigel -"
    param: Parametric "Parametric Sweep"
      sweeptype = filled
      pname = {d, n}
      plistarr = {range(0.1,0.05,0.3), 5 6 7 8 9 10 11}
      punit = {mm, }
    stat: Stationary
  std3 "Etude 3 : Antisymetrique 02 et Glu - Matrigel -"
    param: Parametric "Parametric Sweep"
      sweeptype = filled
      pname = {d, n}
      plistarr = {range(0.1,0.05,0.3), 5 6 7 8 9 10 11}
      punit = {mm, }
    stat: Stationary

Solver configurations
  sol1 "Solution 1" (study std1)
    v1: Variables "Dependent Variables 1"
    s1: Stationary "Stationary Solver 1"
      fc1: FullyCoupled | linsolver = d1; initstep = 0.01; minstep = 1.0E-6; maxiter = 100
      d1: Direct "Direct, fluid flow variables (spf) (merged)" | linsolver = pardiso; pivotperturb = 1.0E-13
  sol2 "Parametric Solutions 1" (study std1)
  sol635 "Solution 635" (study std2)
    // same settings as sol1
  sol636 "Parametric Solutions 2" (study std2)
  sol727 "Solution 727" (study std3)
    // same settings as sol1
  sol909 "Parametric Solutions 3" (study std3)

Datasets
  dset4: Solution "Etude 2 : Symétrique adjacent 02 et Glu - Matrigel -q50/Parametric Solutions 2" | solution = sol636
  dset2: Solution "Etude 1 : Symétrique 02 et Glu - Matrigel -q50 /Parametric Solutions 1" | solution = sol2
  dset6: Solution "Etude 3 : Antisymetrique 02 et Glu - Matrigel -q50/Parametric Solutions 3" | solution = sol909
  dset1: Solution "Etude 1 : Symétrique 02 et Glu - Matrigel -q50 /Solution 1" | solution = sol1
  dset3: Solution | solution = sol635
  dset5: Solution | solution = sol727

Derived values
  av1: AvSurface "Surface Average 1" on domains 48
    data = dset6
    table = tbl9
    tablecols = level1
    expr = c_O2
    unit = mol/m^3
    descr = Concentration
  int1: IntLine "Line Integration 1" on boundaries 1, 3
    data = dset2
    table = tbl10
    tablecols = level2
    expr = p
    unit = N/m
    descr = Pressure

Tables
  tbl1: Table
    // Surface Average 1
    d (mm) | n=2, Concentration (mol/m^3) | n=3, Concentration (mol/m^3) | n=4, Concentration (mol/m^3) | n=5, Concentration (mol/m^3) | n=6, Concentration (mol/m^3) | n=7, Concentration (mol/m^3) | n=8, Concentration (mol/m^3) | n=9, Concentration (mol/m^3) | n=10, Concentration (mol/m^3)
    0.1 | 0.171729 | 0.182163 | 0.182517 | 0.183683 | 0.184237 | 0.184616 | 0.184663 | 0.184979 | 0.184896
    0.15 | 0.172139 | 0.181831 | 0.18292 | 0.184306 | 0.184258 | 0.185147 | 0.184885 | 0.185437 | 0.1858
    0.2 | 0.172508 | 0.182967 | 0.182875 | 0.184637 | 0.184384 | 0.185223 | 0.185089 | 0.185469 | 0.185413
    0.25 | 0.172816 | 0.182559 | 0.184148 | 0.185027 | 0.184655 | 0.18545 | 0.185899 | 0.185426 | 0.185168
    0.3 | 0.173207 | 0.183832 | 0.184413 | 0.185086 | 0.185686 | 0.185377 | 0.185213 | 0.185129 | 0.182346
  tbl2: Table "Symétrique adjacent 02"
    n | d=0.1 mm, Concentration (mol/m^3) | d=0.15 mm, Concentration (mol/m^3) | d=0.2 mm, Concentration (mol/m^3) | d=0.25 mm, Concentration (mol/m^3) | d=0.3 mm, Concentration (mol/m^3)
    2 | 0.0416057 | 0.0403914 | 0.0392457 | 0.0382524 | 0.0370542
    3 | 0.0293174 | 0.0286143 | 0.0278762 | 0.0275316 | 0.0270469
    4 | 0.0266086 | 0.0263174 | 0.0260837 | 0.0259065 | 0.0257859
    5 | 0.0260631 | 0.0259421 | 0.0258356 | 0.0257049 | 0.0255503
    6 | 0.0259516 | 0.0258267 | 0.0256972 | 0.0254641 | 0.025235
    7 | 0.0259181 | 0.0257205 | 0.0254565 | 0.0251506 | 0.0249681
    8 | 0.0257864 | 0.0255111 | 0.0251695 | 0.0250929 | 0.0273777
    9 | 0.0256527 | 0.0252825 | 0.0251456 | 0.0276273 | 0.046348
    10 | 0.0254315 | 0.0251198 | 0.0267296 | 0.0421928 | 0.0888288
  tbl4: Table "Symétrique adjacent Glu"
    n | d=0.1 mm, Concentration (mol/m^3) | d=0.15 mm, Concentration (mol/m^3) | d=0.2 mm, Concentration (mol/m^3) | d=0.25 mm, Concentration (mol/m^3) | d=0.3 mm, Concentration (mol/m^3)
    2 | 24.15 | 24.1276 | 24.1056 | 24.0839 | 24.0578
    3 | 23.8487 | 23.8159 | 23.7839 | 23.7612 | 23.7381
    4 | 23.7132 | 23.6989 | 23.6901 | 23.6852 | 23.6819
    5 | 23.7019 | 23.6992 | 23.699 | 23.6957 | 23.6893
    6 | 23.7148 | 23.7114 | 23.7051 | 23.6896 | 23.6661
    7 | 23.7218 | 23.7093 | 23.6876 | 23.655 | 23.6281
    8 | 23.7182 | 23.6915 | 23.653 | 23.6328 | 23.828
    9 | 23.7029 | 23.6618 | 23.634 | 23.8453 | 24.3359
    10 | 23.6787 | 23.6333 | 23.773 | 24.279 | 24.627
  tbl3: Table "Antisymetrique 02"
    n | d=0.1 mm, Concentration (mol/m^3) | d=0.15 mm, Concentration (mol/m^3) | d=0.2 mm, Concentration (mol/m^3) | d=0.25 mm, Concentration (mol/m^3) | d=0.3 mm, Concentration (mol/m^3)
    2 | 0.0389691 | 0.0380446 | 0.0371028 | 0.0362446 | 0.0352932
    3 | 0.0284107 | 0.0278075 | 0.0273749 | 0.0269127 | 0.0265647
    4 | 0.0263643 | 0.026144 | 0.0259467 | 0.0257921 | 0.0257058
    5 | 0.0259276 | 0.025869 | 0.0257906 | 0.0257465 | 0.0256015
    6 | 0.0258907 | 0.0258238 | 0.0257548 | 0.0255497 | 0.0253785
    7 | 0.0259318 | 0.0257885 | 0.0255851 | 0.0252872 | 0.0249273
    8 | 0.0258185 | 0.0256057 | 0.0252783 | 0.0249673 | 0.0249582
    9 | 0.0257342 | 0.0253575 | 0.0250016 | 0.0250272 | 0.0264059
    10 | 0.0255299 | 0.0251534 | 0.0250421 | 0.0263486 | 0.0278097
  tbl5: Table "Antisymétrique Glu"
    n | d=0.1 mm, Concentration (mol/m^3) | d=0.15 mm, Concentration (mol/m^3) | d=0.2 mm, Concentration (mol/m^3) | d=0.25 mm, Concentration (mol/m^3) | d=0.3 mm, Concentration (mol/m^3)
    2 | 24.1225 | 24.1021 | 24.0803 | 24.0592 | 24.0352
    3 | 23.8114 | 23.7748 | 23.7504 | 23.7203 | 23.7003
    4 | 23.6758 | 23.6614 | 23.6518 | 23.6458 | 23.644
    5 | 23.6552 | 23.6565 | 23.659 | 23.6621 | 23.6596
    6 | 23.6657 | 23.6685 | 23.6695 | 23.6619 | 23.6522
    7 | 23.6793 | 23.6758 | 23.6644 | 23.6455 | 23.6249
    8 | 23.6788 | 23.6652 | 23.6432 | 23.6255 | 23.6533
    9 | 23.6725 | 23.6469 | 23.6255 | 23.6607 | 23.8161
    10 | 23.6573 | 23.6313 | 23.6486 | 23.8007 | 23.9341
  tbl6: Table "Symétrique 02"
    n | d=0.1 mm, Concentration (mol/m^3) | d=0.15 mm, Concentration (mol/m^3) | d=0.2 mm, Concentration (mol/m^3) | d=0.25 mm, Concentration (mol/m^3) | d=0.3 mm, Concentration (mol/m^3)
    2 | 0.17497 | 0.175268 | 0.175628 | 0.175957 | 0.176305
    3 | 0.183982 | 0.183334 | 0.184756 | 0.184443 | 0.184987
    4 | 0.184173 | 0.183956 | 0.184597 | 0.185447 | 0.185824
    5 | 0.18476 | 0.185473 | 0.185808 | 0.186297 | 0.186368
    6 | 0.185636 | 0.185879 | 0.186281 | 0.18637 | 0.187114
    7 | 0.186005 | 0.186608 | 0.186587 | 0.186858 | 0.186651
    8 | 0.186415 | 0.186775 | 0.187006 | 0.187369 | 0.187166
    9 | 0.186356 | 0.18701 | 0.186736 | 0.186717 | 0.186379
    10 | 0.186802 | 0.18724 | 0.186684 | 0.186617 | 0.183881
  tbl7: Table "Symétrique Glu"
    n | d=0.1 mm, Concentration (mol/m^3) | d=0.15 mm, Concentration (mol/m^3) | d=0.2 mm, Concentration (mol/m^3) | d=0.25 mm, Concentration (mol/m^3) | d=0.3 mm, Concentration (mol/m^3)
    2 | 24.9034 | 24.9039 | 24.905 | 24.906 | 24.907
    3 | 24.939 | 24.9341 | 24.9418 | 24.9378 | 24.9439
    4 | 24.94 | 24.9386 | 24.9417 | 24.9451 | 24.9444
    5 | 24.9434 | 24.9447 | 24.9458 | 24.9468 | 24.9473
    6 | 24.944 | 24.9429 | 24.9448 | 24.9459 | 24.9491
    7 | 24.9464 | 24.9468 | 24.9477 | 24.9484 | 24.948
    8 | 24.9466 | 24.9459 | 24.9465 | 24.9495 | 24.947
    9 | 24.9471 | 24.9476 | 24.9485 | 24.9478 | 24.9478
    10 | 24.9459 | 24.9492 | 24.9482 | 24.9477 | 24.9417
  tbl8: Table "Symétrique 02 - Matrigel"
    d (mm) | n=5, Concentration (mol/m^3) | n=6, Concentration (mol/m^3) | n=7, Concentration (mol/m^3) | n=8, Concentration (mol/m^3) | n=9, Concentration (mol/m^3) | n=10, Concentration (mol/m^3) | n=11, Concentration (mol/m^3)
    0.1 | 0.0259716 | 0.0262897 | 0.0266056 | 0.0269051 | 0.0271871 | 0.0274357 | 0.027619
    0.15 | 0.026262 | 0.0265874 | 0.026971 | 0.0273022 | 0.0275903 | 0.0277559 | 0.0279016
    0.2 | 0.0265149 | 0.0269205 | 0.0272899 | 0.0276093 | 0.0277885 | 0.0278094 | 0.0278387
    0.25 | 0.0267823 | 0.0271961 | 0.0275689 | 0.027798 | 0.0277672 | 0.0276301 | 0.0273199
    0.3 | 0.0270302 | 0.0274741 | 0.027689 | 0.0277859 | 0.0274931 | 0.0268558 | 0.0254616
  tbl9: Table "Antisymetrique 02 - Matrigel"
    d (mm) | n=5, Concentration (mol/m^3) | n=6, Concentration (mol/m^3) | n=7, Concentration (mol/m^3) | n=8, Concentration (mol/m^3) | n=9, Concentration (mol/m^3) | n=10, Concentration (mol/m^3) | n=11, Concentration (mol/m^3)
    0.1 | 0.0258892 | 0.0258333 | 0.0257749 | 0.0256718 | 0.0256274 | 0.0255189 | 0.0254149
    0.15 | 0.0258517 | 0.0257456 | 0.0256484 | 0.0255448 | 0.0254302 | 0.0252549 | 0.0250972
    0.2 | 0.0257567 | 0.0256472 | 0.0255117 | 0.025341 | 0.0251348 | 0.0248347 | 0.0245539
    0.25 | 0.0256826 | 0.0255142 | 0.0253314 | 0.0250703 | 0.0246796 | 0.0242451 | 0.0237334
    0.3 | 0.0255744 | 0.0253852 | 0.0250541 | 0.0246706 | 0.0240702 | 0.0232463 | 0.0218013
  tbl10: Table "Pressure - Sym"
    d (mm) | n=5, Pressure (N/m) | n=6, Pressure (N/m) | n=7, Pressure (N/m) | n=8, Pressure (N/m) | n=9, Pressure (N/m) | n=10, Pressure (N/m) | n=11, Pressure (N/m)
    0.1 | 40.5386 | 40.5389 | 40.5392 | 40.5395 | 40.5397 | 40.5399 | 40.5401
    0.15 | 40.5388 | 40.5392 | 40.5395 | 40.5398 | 40.5401 | 40.5403 | 40.5405
    0.2 | 40.5391 | 40.5395 | 40.5398 | 40.5401 | 40.5404 | 40.5406 | 40.5408
    0.25 | 40.5393 | 40.5397 | 40.5401 | 40.5404 | 40.5407 | 40.5409 | 40.541
    0.3 | 40.5396 | 40.54 | 40.5404 | 40.5407 | 40.5409 | 40.5411 | 40.5412

Plots
  pg7: PlotGroup1D "Symétrique" | data = none
    tblp1: Table "Table Graph 1" | table = tbl1
  pg11: PlotGroup1D "Symétrique adjacent 02" | data = none; xlabel = n; ylabel = C_O2
    tblp1: Table "Table Graph 1" | table = tbl2
  pg16: PlotGroup1D "Symétrique adjacent Glu" | data = none; xlabel = n; ylabel = C_Glu
    tblp1: Table "Table Graph 1" | table = tbl4
  pg15: PlotGroup1D "Antisymétrique 02" | data = none; xlabel = n; ylabel = C_O2
    tblp1: Table "Table Graph 1" | table = tbl3
  pg17: PlotGroup1D "Antisymétrique Glu" | data = none; xlabel = n; ylabel = C_Glu
    tblp1: Table "Table Graph 1" | table = tbl5
  pg18: PlotGroup1D "Symétrique 02" | data = none; xlabel = n; ylabel = C_O2
    tblp1: Table "Table Graph 1" | table = tbl6
  pg19: PlotGroup1D "Symétrique Glu" | data = none; xlabel = n; ylabel = C_Glu
    tblp2: Table "Table Graph 2" | table = tbl7
  pg32: PlotGroup1D "Symétrique 02 - Matrigel" | data = none
    tblp1: Table "Table Graph 1" | table = tbl8
  pg33: PlotGroup1D "Antisymétrique 02 - Matrigel" | data = none
    tblp1: Table "Table Graph 1" | table = tbl9
  pg20: PlotGroup2D "Velocity (spf)" | data = dset2
    surf1: Surface | expr = spf.U
  pg21: PlotGroup2D "Pressure (spf)" | data = dset2
    con1: Contour | expr = p; levelrounding = off
  pg22: PlotGroup2D "Concentration, O2 (tds)" | data = dset2; prefixintitle = Species O2:
    surf1: Surface | expr = c_O2
    str1: Streamline | expr = {tds.tflux_c_O2x, tds.tflux_c_O2y}; descr = Total flux; udist = 0.02; pointtype = arrow
  pg23: PlotGroup2D "Concentration, glu (tds)" | data = dset6; prefixintitle = Species glu:
    surf1: Surface | expr = c_glu
    str1: Streamline
      expr = {tds.tflux_c_glux, tds.tflux_c_gluy}
      descr = Total flux
      udist = 0.02
      pointtype = arrow
      arrowscale = 16
  pg24: PlotGroup2D "Velocity (spf) 1" | data = dset4
    surf1: Surface | expr = spf.U
  pg25: PlotGroup2D "Pressure (spf) 1" | data = dset4
    con1: Contour | expr = p; levelrounding = off
  pg26: PlotGroup2D "Concentration, O2 (tds) 1" | data = dset4; prefixintitle = Species O2:
    surf1: Surface | expr = c_O2
    str1: Streamline | expr = {tds.tflux_c_O2x, tds.tflux_c_O2y}; pointtype = arrow; arrowlength = logarithmic
  pg27: PlotGroup2D "Concentration, glu (tds) 1" | data = dset4; prefixintitle = Species glu:
    surf1: Surface | expr = c_glu
    str1: Streamline | expr = {tds.tflux_c_glux, tds.tflux_c_gluy}; pointtype = arrow; arrowlength = logarithmic
  pg28: PlotGroup2D "Velocity (spf) 2" | data = dset6
    surf1: Surface | expr = spf.U
  pg29: PlotGroup2D "Pressure (spf) 2" | data = dset6
    con1: Contour | expr = p; levelrounding = off
  pg30: PlotGroup2D "Concentration, O2 (tds) 2" | data = dset6; prefixintitle = Species O2:
    surf1: Surface | expr = c_O2
    str1: Streamline | expr = {tds.tflux_c_O2x, tds.tflux_c_O2y}; pointtype = arrow; arrowlength = logarithmic
  pg31: PlotGroup2D "Concentration, glu (tds) 2" | data = dset6; prefixintitle = Species glu:
    surf1: Surface | expr = c_glu
    str1: Streamline | expr = {tds.tflux_c_glux, tds.tflux_c_gluy}; pointtype = arrow; arrowlength = logarithmic
  pg34: PlotGroup1D "1D Plot Group 34" | data = none; xlabel = d (mm)
    tblp1: Table "Table Graph 1" | table = tbl10

Exports
  img1: Image | sourceobject = pg11; size = current; unit = px; width = 874; height = 656; pngfilename = 02_ADJ
  img2: Image | sourceobject = pg15; size = current; unit = px; width = 874; height = 656; pngfilename = 02_ANT
  img3: Image | size = current; unit = px; width = 874; height = 656; pngfilename = CAS_ADJ_DOUTEUX
  img4: Image | size = current; unit = px; width = 874; height = 656; pngfilename = CAS_ADJ_VIABLE
  img5: Image | size = current; unit = px; width = 874; height = 656; pngfilename = 02_ANT
  img6: Image | sourceobject = pg17; size = current; unit = px; width = 874; height = 656; pngfilename = GLU_ANT